<neuroml xmlns="http://www.neuroml.org/schema/neuroml2"  xmlns:xs="http://www.w3.org/2001/XMLSchema" xmlns:xsi="http://www.w3.org/2001/XMLSchema-instance" xsi:schemaLocation="http://www.neuroml.org/schema/neuroml2 https://raw.github.com/NeuroML/NeuroML2/development/Schemas/NeuroML2/NeuroML_v2beta5.xsd" id="Interareal_3">
    <notes>Generated network: Interareal_3
    Generation seed: 1234
    NeuroMLlite parameters:
        wie = -3.25
        V1_V4_FF_l2e_l2e = 1.0
        V4_MT_FB_l5e_l2e = 0.1
        V4_MT_FB_l5e_l5e = 0.9
        V4_MT_FB_l5e_l2i = 0.5
        l2e_l5e = 1
        wii = -2.5
        V1_MT_FF_l2e_l2e = 1.0
        wee = 1.5
        V1_V4_FB_l5e_l5e = 0.9
        wei = 3.5
        V1_V4_FB_l5e_l5i = 0.5
        sigma23 = 0.3
        V1_MT_FB_l5e_l2i = 0.5
        l5e_l2i = 0.75
        V4_MT_FB_l5e_l5i = 0.5
        V1_MT_FB_l5e_l2e = 0.1
        V4_MT_FF_l2e_l2e = 1.0
        sigma56 = 0.45
        V1_MT_FB_l5e_l5i = 0.5
        V1_V4_FB_l5e_l2e = 0.1
        V1_MT_FB_l5e_l5e = 0.9
        V1_V4_FB_l5e_l2i = 0.5</notes>
    <include href="Prototypes.xml"/>
    <include href="RateBased.xml"/>
    <include href="NoisyCurrentSource.xml"/>
    <silentSynapse id="silentSyn_proj_V1_L23_E_V1_L23_E"/>
    <silentSynapse id="silentSyn_proj_V1_L23_E_V1_L23_I"/>
    <silentSynapse id="silentSyn_proj_V1_L23_E_V1_L56_E"/>
    <silentSynapse id="silentSyn_proj_V1_L23_E_V1_L56_I"/>
    <silentSynapse id="silentSyn_proj_V1_L23_E_V4_L23_E"/>
    <silentSynapse id="silentSyn_proj_V1_L23_E_V4_L23_I"/>
    <silentSynapse id="silentSyn_proj_V1_L23_E_V4_L56_E"/>
    <silentSynapse id="silentSyn_proj_V1_L23_E_V4_L56_I"/>
    <silentSynapse id="silentSyn_proj_V1_L23_E_MT_L23_E"/>
    <silentSynapse id="silentSyn_proj_V1_L23_E_MT_L23_I"/>
    <silentSynapse id="silentSyn_proj_V1_L23_E_MT_L56_E"/>
    <silentSynapse id="silentSyn_proj_V1_L23_E_MT_L56_I"/>
    <silentSynapse id="silentSyn_proj_V1_L23_I_V1_L23_E"/>
    <silentSynapse id="silentSyn_proj_V1_L23_I_V1_L23_I"/>
    <silentSynapse id="silentSyn_proj_V1_L23_I_V1_L56_E"/>
    <silentSynapse id="silentSyn_proj_V1_L23_I_V1_L56_I"/>
    <silentSynapse id="silentSyn_proj_V1_L23_I_V4_L23_E"/>
    <silentSynapse id="silentSyn_proj_V1_L23_I_V4_L23_I"/>
    <silentSynapse id="silentSyn_proj_V1_L23_I_V4_L56_E"/>
    <silentSynapse id="silentSyn_proj_V1_L23_I_V4_L56_I"/>
    <silentSynapse id="silentSyn_proj_V1_L23_I_MT_L23_E"/>
    <silentSynapse id="silentSyn_proj_V1_L23_I_MT_L23_I"/>
    <silentSynapse id="silentSyn_proj_V1_L23_I_MT_L56_E"/>
    <silentSynapse id="silentSyn_proj_V1_L23_I_MT_L56_I"/>
    <silentSynapse id="silentSyn_proj_V1_L56_E_V1_L23_E"/>
    <silentSynapse id="silentSyn_proj_V1_L56_E_V1_L23_I"/>
    <silentSynapse id="silentSyn_proj_V1_L56_E_V1_L56_E"/>
    <silentSynapse id="silentSyn_proj_V1_L56_E_V1_L56_I"/>
    <silentSynapse id="silentSyn_proj_V1_L56_E_V4_L23_E"/>
    <silentSynapse id="silentSyn_proj_V1_L56_E_V4_L23_I"/>
    <silentSynapse id="silentSyn_proj_V1_L56_E_V4_L56_E"/>
    <silentSynapse id="silentSyn_proj_V1_L56_E_V4_L56_I"/>
    <silentSynapse id="silentSyn_proj_V1_L56_E_MT_L23_E"/>
    <silentSynapse id="silentSyn_proj_V1_L56_E_MT_L23_I"/>
    <silentSynapse id="silentSyn_proj_V1_L56_E_MT_L56_E"/>
    <silentSynapse id="silentSyn_proj_V1_L56_E_MT_L56_I"/>
    <silentSynapse id="silentSyn_proj_V1_L56_I_V1_L23_E"/>
    <silentSynapse id="silentSyn_proj_V1_L56_I_V1_L23_I"/>
    <silentSynapse id="silentSyn_proj_V1_L56_I_V1_L56_E"/>
    <silentSynapse id="silentSyn_proj_V1_L56_I_V1_L56_I"/>
    <silentSynapse id="silentSyn_proj_V1_L56_I_V4_L23_E"/>
    <silentSynapse id="silentSyn_proj_V1_L56_I_V4_L23_I"/>
    <silentSynapse id="silentSyn_proj_V1_L56_I_V4_L56_E"/>
    <silentSynapse id="silentSyn_proj_V1_L56_I_V4_L56_I"/>
    <silentSynapse id="silentSyn_proj_V1_L56_I_MT_L23_E"/>
    <silentSynapse id="silentSyn_proj_V1_L56_I_MT_L23_I"/>
    <silentSynapse id="silentSyn_proj_V1_L56_I_MT_L56_E"/>
    <silentSynapse id="silentSyn_proj_V1_L56_I_MT_L56_I"/>
    <silentSynapse id="silentSyn_proj_V4_L23_E_V1_L23_E"/>
    <silentSynapse id="silentSyn_proj_V4_L23_E_V1_L23_I"/>
    <silentSynapse id="silentSyn_proj_V4_L23_E_V1_L56_E"/>
    <silentSynapse id="silentSyn_proj_V4_L23_E_V1_L56_I"/>
    <silentSynapse id="silentSyn_proj_V4_L23_E_V4_L23_E"/>
    <silentSynapse id="silentSyn_proj_V4_L23_E_V4_L23_I"/>
    <silentSynapse id="silentSyn_proj_V4_L23_E_V4_L56_E"/>
    <silentSynapse id="silentSyn_proj_V4_L23_E_V4_L56_I"/>
    <silentSynapse id="silentSyn_proj_V4_L23_E_MT_L23_E"/>
    <silentSynapse id="silentSyn_proj_V4_L23_E_MT_L23_I"/>
    <silentSynapse id="silentSyn_proj_V4_L23_E_MT_L56_E"/>
    <silentSynapse id="silentSyn_proj_V4_L23_E_MT_L56_I"/>
    <silentSynapse id="silentSyn_proj_V4_L23_I_V1_L23_E"/>
    <silentSynapse id="silentSyn_proj_V4_L23_I_V1_L23_I"/>
    <silentSynapse id="silentSyn_proj_V4_L23_I_V1_L56_E"/>
    <silentSynapse id="silentSyn_proj_V4_L23_I_V1_L56_I"/>
    <silentSynapse id="silentSyn_proj_V4_L23_I_V4_L23_E"/>
    <silentSynapse id="silentSyn_proj_V4_L23_I_V4_L23_I"/>
    <silentSynapse id="silentSyn_proj_V4_L23_I_V4_L56_E"/>
    <silentSynapse id="silentSyn_proj_V4_L23_I_V4_L56_I"/>
    <silentSynapse id="silentSyn_proj_V4_L23_I_MT_L23_E"/>
    <silentSynapse id="silentSyn_proj_V4_L23_I_MT_L23_I"/>
    <silentSynapse id="silentSyn_proj_V4_L23_I_MT_L56_E"/>
    <silentSynapse id="silentSyn_proj_V4_L23_I_MT_L56_I"/>
    <silentSynapse id="silentSyn_proj_V4_L56_E_V1_L23_E"/>
    <silentSynapse id="silentSyn_proj_V4_L56_E_V1_L23_I"/>
    <silentSynapse id="silentSyn_proj_V4_L56_E_V1_L56_E"/>
    <silentSynapse id="silentSyn_proj_V4_L56_E_V1_L56_I"/>
    <silentSynapse id="silentSyn_proj_V4_L56_E_V4_L23_E"/>
    <silentSynapse id="silentSyn_proj_V4_L56_E_V4_L23_I"/>
    <silentSynapse id="silentSyn_proj_V4_L56_E_V4_L56_E"/>
    <silentSynapse id="silentSyn_proj_V4_L56_E_V4_L56_I"/>
    <silentSynapse id="silentSyn_proj_V4_L56_E_MT_L23_E"/>
    <silentSynapse id="silentSyn_proj_V4_L56_E_MT_L23_I"/>
    <silentSynapse id="silentSyn_proj_V4_L56_E_MT_L56_E"/>
    <silentSynapse id="silentSyn_proj_V4_L56_E_MT_L56_I"/>
    <silentSynapse id="silentSyn_proj_V4_L56_I_V1_L23_E"/>
    <silentSynapse id="silentSyn_proj_V4_L56_I_V1_L23_I"/>
    <silentSynapse id="silentSyn_proj_V4_L56_I_V1_L56_E"/>
    <silentSynapse id="silentSyn_proj_V4_L56_I_V1_L56_I"/>
    <silentSynapse id="silentSyn_proj_V4_L56_I_V4_L23_E"/>
    <silentSynapse id="silentSyn_proj_V4_L56_I_V4_L23_I"/>
    <silentSynapse id="silentSyn_proj_V4_L56_I_V4_L56_E"/>
    <silentSynapse id="silentSyn_proj_V4_L56_I_V4_L56_I"/>
    <silentSynapse id="silentSyn_proj_V4_L56_I_MT_L23_E"/>
    <silentSynapse id="silentSyn_proj_V4_L56_I_MT_L23_I"/>
    <silentSynapse id="silentSyn_proj_V4_L56_I_MT_L56_E"/>
    <silentSynapse id="silentSyn_proj_V4_L56_I_MT_L56_I"/>
    <silentSynapse id="silentSyn_proj_MT_L23_E_V1_L23_E"/>
    <silentSynapse id="silentSyn_proj_MT_L23_E_V1_L23_I"/>
    <silentSynapse id="silentSyn_proj_MT_L23_E_V1_L56_E"/>
    <silentSynapse id="silentSyn_proj_MT_L23_E_V1_L56_I"/>
    <silentSynapse id="silentSyn_proj_MT_L23_E_V4_L23_E"/>
    <silentSynapse id="silentSyn_proj_MT_L23_E_V4_L23_I"/>
    <silentSynapse id="silentSyn_proj_MT_L23_E_V4_L56_E"/>
    <silentSynapse id="silentSyn_proj_MT_L23_E_V4_L56_I"/>
    <silentSynapse id="silentSyn_proj_MT_L23_E_MT_L23_E"/>
    <silentSynapse id="silentSyn_proj_MT_L23_E_MT_L23_I"/>
    <silentSynapse id="silentSyn_proj_MT_L23_E_MT_L56_E"/>
    <silentSynapse id="silentSyn_proj_MT_L23_E_MT_L56_I"/>
    <silentSynapse id="silentSyn_proj_MT_L23_I_V1_L23_E"/>
    <silentSynapse id="silentSyn_proj_MT_L23_I_V1_L23_I"/>
    <silentSynapse id="silentSyn_proj_MT_L23_I_V1_L56_E"/>
    <silentSynapse id="silentSyn_proj_MT_L23_I_V1_L56_I"/>
    <silentSynapse id="silentSyn_proj_MT_L23_I_V4_L23_E"/>
    <silentSynapse id="silentSyn_proj_MT_L23_I_V4_L23_I"/>
    <silentSynapse id="silentSyn_proj_MT_L23_I_V4_L56_E"/>
    <silentSynapse id="silentSyn_proj_MT_L23_I_V4_L56_I"/>
    <silentSynapse id="silentSyn_proj_MT_L23_I_MT_L23_E"/>
    <silentSynapse id="silentSyn_proj_MT_L23_I_MT_L23_I"/>
    <silentSynapse id="silentSyn_proj_MT_L23_I_MT_L56_E"/>
    <silentSynapse id="silentSyn_proj_MT_L23_I_MT_L56_I"/>
    <silentSynapse id="silentSyn_proj_MT_L56_E_V1_L23_E"/>
    <silentSynapse id="silentSyn_proj_MT_L56_E_V1_L23_I"/>
    <silentSynapse id="silentSyn_proj_MT_L56_E_V1_L56_E"/>
    <silentSynapse id="silentSyn_proj_MT_L56_E_V1_L56_I"/>
    <silentSynapse id="silentSyn_proj_MT_L56_E_V4_L23_E"/>
    <silentSynapse id="silentSyn_proj_MT_L56_E_V4_L23_I"/>
    <silentSynapse id="silentSyn_proj_MT_L56_E_V4_L56_E"/>
    <silentSynapse id="silentSyn_proj_MT_L56_E_V4_L56_I"/>
    <silentSynapse id="silentSyn_proj_MT_L56_E_MT_L23_E"/>
    <silentSynapse id="silentSyn_proj_MT_L56_E_MT_L23_I"/>
    <silentSynapse id="silentSyn_proj_MT_L56_E_MT_L56_E"/>
    <silentSynapse id="silentSyn_proj_MT_L56_E_MT_L56_I"/>
    <silentSynapse id="silentSyn_proj_MT_L56_I_V1_L23_E"/>
    <silentSynapse id="silentSyn_proj_MT_L56_I_V1_L23_I"/>
    <silentSynapse id="silentSyn_proj_MT_L56_I_V1_L56_E"/>
    <silentSynapse id="silentSyn_proj_MT_L56_I_V1_L56_I"/>
    <silentSynapse id="silentSyn_proj_MT_L56_I_V4_L23_E"/>
    <silentSynapse id="silentSyn_proj_MT_L56_I_V4_L23_I"/>
    <silentSynapse id="silentSyn_proj_MT_L56_I_V4_L56_E"/>
    <silentSynapse id="silentSyn_proj_MT_L56_I_V4_L56_I"/>
    <silentSynapse id="silentSyn_proj_MT_L56_I_MT_L23_E"/>
    <silentSynapse id="silentSyn_proj_MT_L56_I_MT_L23_I"/>
    <silentSynapse id="silentSyn_proj_MT_L56_I_MT_L56_E"/>
    <silentSynapse id="silentSyn_proj_MT_L56_I_MT_L56_I"/>
    <pulseGenerator id="iclamp_23_V1" delay="0ms" duration="40000.0ms" amplitude="2nA"/>
    <pulseGenerator id="iclamp_56_V1" delay="0ms" duration="40000.0ms" amplitude="4nA"/>
    <pulseGenerator id="iclamp_23_V4" delay="0ms" duration="40000.0ms" amplitude="2nA"/>
    <pulseGenerator id="iclamp_56_V4" delay="0ms" duration="40000.0ms" amplitude="4nA"/>
    <pulseGenerator id="iclamp_23_MT" delay="0ms" duration="40000.0ms" amplitude="2nA"/>
    <pulseGenerator id="iclamp_56_MT" delay="0ms" duration="40000.0ms" amplitude="4nA"/>
    <network id="Interareal_3">
        <notes>Testing...</notes>
        <population id="V1_L23_E" component="L23_E_comp" size="1" type="populationList">
            <property tag="region" value="V1_L23"/>
            <instance id="0">
                <location x="28.993606070764162" y="43.221977975260579" z="0.224744101757616"/>
            </instance>
        </population>
        <population id="V1_L23_I" component="L23_I_comp" size="1" type="populationList">
            <property tag="region" value="V1_L23"/>
            <instance id="0">
                <location x="27.329278873473726" y="58.178069920912918" z="17.466827191768473"/>
            </instance>
        </population>
        <population id="V1_L56_E" component="L56_E_comp" size="1" type="populationList">
            <property tag="region" value="V1_L56"/>
            <instance id="0">
                <location x="20.146904444639553" y="2.518146805112519" z="22.994427983753887"/>
            </instance>
        </population>
        <population id="V1_L56_I" component="L56_I_comp" size="1" type="populationList">
            <property tag="region" value="V1_L56"/>
            <instance id="0">
                <location x="7.104293260893533" y="0.924420651798299" z="23.663181517088503"/>
            </instance>
        </population>
        <population id="V4_L23_E" component="L23_E_comp" size="1" type="populationList">
            <property tag="region" value="V4_L23"/>
            <instance id="0">
                <location x="70.382668967913688" y="48.698444251175054" z="18.474470853108457"/>
            </instance>
        </population>
        <population id="V4_L23_I" component="L23_I_comp" size="1" type="populationList">
            <property tag="region" value="V4_L23"/>
            <instance id="0">
                <location x="64.456639161248631" y="35.492719422297952" z="3.432389090660629"/>
            </instance>
        </population>
        <population id="V4_L56_E" component="L56_E_comp" size="1" type="populationList">
            <property tag="region" value="V4_L56"/>
            <instance id="0">
                <location x="60.438563414607273" y="14.60254621814275" z="28.947046827486471"/>
            </instance>
        </population>
        <population id="V4_L56_I" component="L56_I_comp" size="1" type="populationList">
            <property tag="region" value="V4_L56"/>
            <instance id="0">
                <location x="61.936868429315581" y="16.232645566533908" z="13.976956770249288"/>
            </instance>
        </population>
        <population id="MT_L23_E" component="L23_E_comp" size="1" type="populationList">
            <property tag="region" value="MT_L23"/>
            <instance id="0">
                <location x="138.043903486831539" y="32.667864899719866" z="17.370080585620997"/>
            </instance>
        </population>
        <population id="MT_L23_I" component="L23_I_comp" size="1" type="populationList">
            <property tag="region" value="MT_L23"/>
            <instance id="0">
                <location x="128.087565114583441" y="46.692976816686468" z="19.339027025348482"/>
            </instance>
        </population>
        <population id="MT_L56_E" component="L56_E_comp" size="1" type="populationList">
            <property tag="region" value="MT_L56"/>
            <instance id="0">
                <location x="134.431091140995562" y="10.657174423289501" z="7.47456364083627"/>
            </instance>
        </population>
        <population id="MT_L56_I" component="L56_I_comp" size="1" type="populationList">
            <property tag="region" value="MT_L56"/>
            <instance id="0">
                <location x="148.00546494127039" y="13.601640584294806" z="15.904836207347708"/>
            </instance>
        </population>
        <continuousProjection id="proj_V1_L23_E_V1_L23_E" presynapticPopulation="V1_L23_E" postsynapticPopulation="V1_L23_E">
            <continuousConnectionInstanceW id="0" preCell="../V1_L23_E/0/L23_E_comp" postCell="../V1_L23_E/0/L23_E_comp" preComponent="silentSyn_proj_V1_L23_E_V1_L23_E" postComponent="rs" weight="1.5"/>
        </continuousProjection>
        <continuousProjection id="proj_V1_L23_E_V1_L23_I" presynapticPopulation="V1_L23_E" postsynapticPopulation="V1_L23_I">
            <continuousConnectionInstanceW id="0" preCell="../V1_L23_E/0/L23_E_comp" postCell="../V1_L23_I/0/L23_I_comp" preComponent="silentSyn_proj_V1_L23_E_V1_L23_I" postComponent="rs" weight="3.5"/>
        </continuousProjection>
        <continuousProjection id="proj_V1_L23_E_V1_L56_E" presynapticPopulation="V1_L23_E" postsynapticPopulation="V1_L56_E">
            <continuousConnectionInstance id="0" preCell="../V1_L23_E/0/L23_E_comp" postCell="../V1_L56_E/0/L56_E_comp" preComponent="silentSyn_proj_V1_L23_E_V1_L56_E" postComponent="rs"/>
        </continuousProjection>
        <continuousProjection id="proj_V1_L23_E_V1_L56_I" presynapticPopulation="V1_L23_E" postsynapticPopulation="V1_L56_I">
            <continuousConnectionInstanceW id="0" preCell="../V1_L23_E/0/L23_E_comp" postCell="../V1_L56_I/0/L56_I_comp" preComponent="silentSyn_proj_V1_L23_E_V1_L56_I" postComponent="rs" weight="0."/>
        </continuousProjection>
        <continuousProjection id="proj_V1_L23_E_V4_L23_E" presynapticPopulation="V1_L23_E" postsynapticPopulation="V4_L23_E">
            <continuousConnectionInstance id="0" preCell="../V1_L23_E/0/L23_E_comp" postCell="../V4_L23_E/0/L23_E_comp" preComponent="silentSyn_proj_V1_L23_E_V4_L23_E" postComponent="rs"/>
        </continuousProjection>
        <continuousProjection id="proj_V1_L23_E_V4_L23_I" presynapticPopulation="V1_L23_E" postsynapticPopulation="V4_L23_I">
            <continuousConnectionInstanceW id="0" preCell="../V1_L23_E/0/L23_E_comp" postCell="../V4_L23_I/0/L23_I_comp" preComponent="silentSyn_proj_V1_L23_E_V4_L23_I" postComponent="rs" weight="0."/>
        </continuousProjection>
        <continuousProjection id="proj_V1_L23_E_V4_L56_E" presynapticPopulation="V1_L23_E" postsynapticPopulation="V4_L56_E">
            <continuousConnectionInstanceW id="0" preCell="../V1_L23_E/0/L23_E_comp" postCell="../V4_L56_E/0/L56_E_comp" preComponent="silentSyn_proj_V1_L23_E_V4_L56_E" postComponent="rs" weight="0."/>
        </continuousProjection>
        <continuousProjection id="proj_V1_L23_E_V4_L56_I" presynapticPopulation="V1_L23_E" postsynapticPopulation="V4_L56_I">
            <continuousConnectionInstanceW id="0" preCell="../V1_L23_E/0/L23_E_comp" postCell="../V4_L56_I/0/L56_I_comp" preComponent="silentSyn_proj_V1_L23_E_V4_L56_I" postComponent="rs" weight="0."/>
        </continuousProjection>
        <continuousProjection id="proj_V1_L23_E_MT_L23_E" presynapticPopulation="V1_L23_E" postsynapticPopulation="MT_L23_E">
            <continuousConnectionInstance id="0" preCell="../V1_L23_E/0/L23_E_comp" postCell="../MT_L23_E/0/L23_E_comp" preComponent="silentSyn_proj_V1_L23_E_MT_L23_E" postComponent="rs"/>
        </continuousProjection>
        <continuousProjection id="proj_V1_L23_E_MT_L23_I" presynapticPopulation="V1_L23_E" postsynapticPopulation="MT_L23_I">
            <continuousConnectionInstanceW id="0" preCell="../V1_L23_E/0/L23_E_comp" postCell="../MT_L23_I/0/L23_I_comp" preComponent="silentSyn_proj_V1_L23_E_MT_L23_I" postComponent="rs" weight="0."/>
        </continuousProjection>
        <continuousProjection id="proj_V1_L23_E_MT_L56_E" presynapticPopulation="V1_L23_E" postsynapticPopulation="MT_L56_E">
            <continuousConnectionInstanceW id="0" preCell="../V1_L23_E/0/L23_E_comp" postCell="../MT_L56_E/0/L56_E_comp" preComponent="silentSyn_proj_V1_L23_E_MT_L56_E" postComponent="rs" weight="0."/>
        </continuousProjection>
        <continuousProjection id="proj_V1_L23_E_MT_L56_I" presynapticPopulation="V1_L23_E" postsynapticPopulation="MT_L56_I">
            <continuousConnectionInstanceW id="0" preCell="../V1_L23_E/0/L23_E_comp" postCell="../MT_L56_I/0/L56_I_comp" preComponent="silentSyn_proj_V1_L23_E_MT_L56_I" postComponent="rs" weight="0."/>
        </continuousProjection>
        <continuousProjection id="proj_V1_L23_I_V1_L23_E" presynapticPopulation="V1_L23_I" postsynapticPopulation="V1_L23_E">
            <continuousConnectionInstanceW id="0" preCell="../V1_L23_I/0/L23_I_comp" postCell="../V1_L23_E/0/L23_E_comp" preComponent="silentSyn_proj_V1_L23_I_V1_L23_E" postComponent="rs" weight="-3.25"/>
        </continuousProjection>
        <continuousProjection id="proj_V1_L23_I_V1_L23_I" presynapticPopulation="V1_L23_I" postsynapticPopulation="V1_L23_I">
            <continuousConnectionInstanceW id="0" preCell="../V1_L23_I/0/L23_I_comp" postCell="../V1_L23_I/0/L23_I_comp" preComponent="silentSyn_proj_V1_L23_I_V1_L23_I" postComponent="rs" weight="-2.5"/>
        </continuousProjection>
        <continuousProjection id="proj_V1_L23_I_V1_L56_E" presynapticPopulation="V1_L23_I" postsynapticPopulation="V1_L56_E">
            <continuousConnectionInstanceW id="0" preCell="../V1_L23_I/0/L23_I_comp" postCell="../V1_L56_E/0/L56_E_comp" preComponent="silentSyn_proj_V1_L23_I_V1_L56_E" postComponent="rs" weight="0."/>
        </continuousProjection>
        <continuousProjection id="proj_V1_L23_I_V1_L56_I" presynapticPopulation="V1_L23_I" postsynapticPopulation="V1_L56_I">
            <continuousConnectionInstanceW id="0" preCell="../V1_L23_I/0/L23_I_comp" postCell="../V1_L56_I/0/L56_I_comp" preComponent="silentSyn_proj_V1_L23_I_V1_L56_I" postComponent="rs" weight="0."/>
        </continuousProjection>
        <continuousProjection id="proj_V1_L23_I_V4_L23_E" presynapticPopulation="V1_L23_I" postsynapticPopulation="V4_L23_E">
            <continuousConnectionInstanceW id="0" preCell="../V1_L23_I/0/L23_I_comp" postCell="../V4_L23_E/0/L23_E_comp" preComponent="silentSyn_proj_V1_L23_I_V4_L23_E" postComponent="rs" weight="0."/>
        </continuousProjection>
        <continuousProjection id="proj_V1_L23_I_V4_L23_I" presynapticPopulation="V1_L23_I" postsynapticPopulation="V4_L23_I">
            <continuousConnectionInstanceW id="0" preCell="../V1_L23_I/0/L23_I_comp" postCell="../V4_L23_I/0/L23_I_comp" preComponent="silentSyn_proj_V1_L23_I_V4_L23_I" postComponent="rs" weight="0."/>
        </continuousProjection>
        <continuousProjection id="proj_V1_L23_I_V4_L56_E" presynapticPopulation="V1_L23_I" postsynapticPopulation="V4_L56_E">
            <continuousConnectionInstanceW id="0" preCell="../V1_L23_I/0/L23_I_comp" postCell="../V4_L56_E/0/L56_E_comp" preComponent="silentSyn_proj_V1_L23_I_V4_L56_E" postComponent="rs" weight="0."/>
        </continuousProjection>
        <continuousProjection id="proj_V1_L23_I_V4_L56_I" presynapticPopulation="V1_L23_I" postsynapticPopulation="V4_L56_I">
            <continuousConnectionInstanceW id="0" preCell="../V1_L23_I/0/L23_I_comp" postCell="../V4_L56_I/0/L56_I_comp" preComponent="silentSyn_proj_V1_L23_I_V4_L56_I" postComponent="rs" weight="0."/>
        </continuousProjection>
        <continuousProjection id="proj_V1_L23_I_MT_L23_E" presynapticPopulation="V1_L23_I" postsynapticPopulation="MT_L23_E">
            <continuousConnectionInstanceW id="0" preCell="../V1_L23_I/0/L23_I_comp" postCell="../MT_L23_E/0/L23_E_comp" preComponent="silentSyn_proj_V1_L23_I_MT_L23_E" postComponent="rs" weight="0."/>
        </continuousProjection>
        <continuousProjection id="proj_V1_L23_I_MT_L23_I" presynapticPopulation="V1_L23_I" postsynapticPopulation="MT_L23_I">
            <continuousConnectionInstanceW id="0" preCell="../V1_L23_I/0/L23_I_comp" postCell="../MT_L23_I/0/L23_I_comp" preComponent="silentSyn_proj_V1_L23_I_MT_L23_I" postComponent="rs" weight="0."/>
        </continuousProjection>
        <continuousProjection id="proj_V1_L23_I_MT_L56_E" presynapticPopulation="V1_L23_I" postsynapticPopulation="MT_L56_E">
            <continuousConnectionInstanceW id="0" preCell="../V1_L23_I/0/L23_I_comp" postCell="../MT_L56_E/0/L56_E_comp" preComponent="silentSyn_proj_V1_L23_I_MT_L56_E" postComponent="rs" weight="0."/>
        </continuousProjection>
        <continuousProjection id="proj_V1_L23_I_MT_L56_I" presynapticPopulation="V1_L23_I" postsynapticPopulation="MT_L56_I">
            <continuousConnectionInstanceW id="0" preCell="../V1_L23_I/0/L23_I_comp" postCell="../MT_L56_I/0/L56_I_comp" preComponent="silentSyn_proj_V1_L23_I_MT_L56_I" postComponent="rs" weight="0."/>
        </continuousProjection>
        <continuousProjection id="proj_V1_L56_E_V1_L23_E" presynapticPopulation="V1_L56_E" postsynapticPopulation="V1_L23_E">
            <continuousConnectionInstanceW id="0" preCell="../V1_L56_E/0/L56_E_comp" postCell="../V1_L23_E/0/L23_E_comp" preComponent="silentSyn_proj_V1_L56_E_V1_L23_E" postComponent="rs" weight="0."/>
        </continuousProjection>
        <continuousProjection id="proj_V1_L56_E_V1_L23_I" presynapticPopulation="V1_L56_E" postsynapticPopulation="V1_L23_I">
            <continuousConnectionInstanceW id="0" preCell="../V1_L56_E/0/L56_E_comp" postCell="../V1_L23_I/0/L23_I_comp" preComponent="silentSyn_proj_V1_L56_E_V1_L23_I" postComponent="rs" weight="0.75"/>
        </continuousProjection>
        <continuousProjection id="proj_V1_L56_E_V1_L56_E" presynapticPopulation="V1_L56_E" postsynapticPopulation="V1_L56_E">
            <continuousConnectionInstanceW id="0" preCell="../V1_L56_E/0/L56_E_comp" postCell="../V1_L56_E/0/L56_E_comp" preComponent="silentSyn_proj_V1_L56_E_V1_L56_E" postComponent="rs" weight="1.5"/>
        </continuousProjection>
        <continuousProjection id="proj_V1_L56_E_V1_L56_I" presynapticPopulation="V1_L56_E" postsynapticPopulation="V1_L56_I">
            <continuousConnectionInstanceW id="0" preCell="../V1_L56_E/0/L56_E_comp" postCell="../V1_L56_I/0/L56_I_comp" preComponent="silentSyn_proj_V1_L56_E_V1_L56_I" postComponent="rs" weight="3.5"/>
        </continuousProjection>
        <continuousProjection id="proj_V1_L56_E_V4_L23_E" presynapticPopulation="V1_L56_E" postsynapticPopulation="V4_L23_E">
            <continuousConnectionInstanceW id="0" preCell="../V1_L56_E/0/L56_E_comp" postCell="../V4_L23_E/0/L23_E_comp" preComponent="silentSyn_proj_V1_L56_E_V4_L23_E" postComponent="rs" weight="0."/>
        </continuousProjection>
        <continuousProjection id="proj_V1_L56_E_V4_L23_I" presynapticPopulation="V1_L56_E" postsynapticPopulation="V4_L23_I">
            <continuousConnectionInstanceW id="0" preCell="../V1_L56_E/0/L56_E_comp" postCell="../V4_L23_I/0/L23_I_comp" preComponent="silentSyn_proj_V1_L56_E_V4_L23_I" postComponent="rs" weight="0."/>
        </continuousProjection>
        <continuousProjection id="proj_V1_L56_E_V4_L56_E" presynapticPopulation="V1_L56_E" postsynapticPopulation="V4_L56_E">
            <continuousConnectionInstanceW id="0" preCell="../V1_L56_E/0/L56_E_comp" postCell="../V4_L56_E/0/L56_E_comp" preComponent="silentSyn_proj_V1_L56_E_V4_L56_E" postComponent="rs" weight="0."/>
        </continuousProjection>
        <continuousProjection id="proj_V1_L56_E_V4_L56_I" presynapticPopulation="V1_L56_E" postsynapticPopulation="V4_L56_I">
            <continuousConnectionInstanceW id="0" preCell="../V1_L56_E/0/L56_E_comp" postCell="../V4_L56_I/0/L56_I_comp" preComponent="silentSyn_proj_V1_L56_E_V4_L56_I" postComponent="rs" weight="0."/>
        </continuousProjection>
        <continuousProjection id="proj_V1_L56_E_MT_L23_E" presynapticPopulation="V1_L56_E" postsynapticPopulation="MT_L23_E">
            <continuousConnectionInstanceW id="0" preCell="../V1_L56_E/0/L56_E_comp" postCell="../MT_L23_E/0/L23_E_comp" preComponent="silentSyn_proj_V1_L56_E_MT_L23_E" postComponent="rs" weight="0."/>
        </continuousProjection>
        <continuousProjection id="proj_V1_L56_E_MT_L23_I" presynapticPopulation="V1_L56_E" postsynapticPopulation="MT_L23_I">
            <continuousConnectionInstanceW id="0" preCell="../V1_L56_E/0/L56_E_comp" postCell="../MT_L23_I/0/L23_I_comp" preComponent="silentSyn_proj_V1_L56_E_MT_L23_I" postComponent="rs" weight="0."/>
        </continuousProjection>
        <continuousProjection id="proj_V1_L56_E_MT_L56_E" presynapticPopulation="V1_L56_E" postsynapticPopulation="MT_L56_E">
            <continuousConnectionInstanceW id="0" preCell="../V1_L56_E/0/L56_E_comp" postCell="../MT_L56_E/0/L56_E_comp" preComponent="silentSyn_proj_V1_L56_E_MT_L56_E" postComponent="rs" weight="0."/>
        </continuousProjection>
        <continuousProjection id="proj_V1_L56_E_MT_L56_I" presynapticPopulation="V1_L56_E" postsynapticPopulation="MT_L56_I">
            <continuousConnectionInstanceW id="0" preCell="../V1_L56_E/0/L56_E_comp" postCell="../MT_L56_I/0/L56_I_comp" preComponent="silentSyn_proj_V1_L56_E_MT_L56_I" postComponent="rs" weight="0."/>
        </continuousProjection>
        <continuousProjection id="proj_V1_L56_I_V1_L23_E" presynapticPopulation="V1_L56_I" postsynapticPopulation="V1_L23_E">
            <continuousConnectionInstanceW id="0" preCell="../V1_L56_I/0/L56_I_comp" postCell="../V1_L23_E/0/L23_E_comp" preComponent="silentSyn_proj_V1_L56_I_V1_L23_E" postComponent="rs" weight="0."/>
        </continuousProjection>
        <continuousProjection id="proj_V1_L56_I_V1_L23_I" presynapticPopulation="V1_L56_I" postsynapticPopulation="V1_L23_I">
            <continuousConnectionInstanceW id="0" preCell="../V1_L56_I/0/L56_I_comp" postCell="../V1_L23_I/0/L23_I_comp" preComponent="silentSyn_proj_V1_L56_I_V1_L23_I" postComponent="rs" weight="0."/>
        </continuousProjection>
        <continuousProjection id="proj_V1_L56_I_V1_L56_E" presynapticPopulation="V1_L56_I" postsynapticPopulation="V1_L56_E">
            <continuousConnectionInstanceW id="0" preCell="../V1_L56_I/0/L56_I_comp" postCell="../V1_L56_E/0/L56_E_comp" preComponent="silentSyn_proj_V1_L56_I_V1_L56_E" postComponent="rs" weight="-3.25"/>
        </continuousProjection>
        <continuousProjection id="proj_V1_L56_I_V1_L56_I" presynapticPopulation="V1_L56_I" postsynapticPopulation="V1_L56_I">
            <continuousConnectionInstanceW id="0" preCell="../V1_L56_I/0/L56_I_comp" postCell="../V1_L56_I/0/L56_I_comp" preComponent="silentSyn_proj_V1_L56_I_V1_L56_I" postComponent="rs" weight="-2.5"/>
        </continuousProjection>
        <continuousProjection id="proj_V1_L56_I_V4_L23_E" presynapticPopulation="V1_L56_I" postsynapticPopulation="V4_L23_E">
            <continuousConnectionInstanceW id="0" preCell="../V1_L56_I/0/L56_I_comp" postCell="../V4_L23_E/0/L23_E_comp" preComponent="silentSyn_proj_V1_L56_I_V4_L23_E" postComponent="rs" weight="0."/>
        </continuousProjection>
        <continuousProjection id="proj_V1_L56_I_V4_L23_I" presynapticPopulation="V1_L56_I" postsynapticPopulation="V4_L23_I">
            <continuousConnectionInstanceW id="0" preCell="../V1_L56_I/0/L56_I_comp" postCell="../V4_L23_I/0/L23_I_comp" preComponent="silentSyn_proj_V1_L56_I_V4_L23_I" postComponent="rs" weight="0."/>
        </continuousProjection>
        <continuousProjection id="proj_V1_L56_I_V4_L56_E" presynapticPopulation="V1_L56_I" postsynapticPopulation="V4_L56_E">
            <continuousConnectionInstanceW id="0" preCell="../V1_L56_I/0/L56_I_comp" postCell="../V4_L56_E/0/L56_E_comp" preComponent="silentSyn_proj_V1_L56_I_V4_L56_E" postComponent="rs" weight="0."/>
        </continuousProjection>
        <continuousProjection id="proj_V1_L56_I_V4_L56_I" presynapticPopulation="V1_L56_I" postsynapticPopulation="V4_L56_I">
            <continuousConnectionInstanceW id="0" preCell="../V1_L56_I/0/L56_I_comp" postCell="../V4_L56_I/0/L56_I_comp" preComponent="silentSyn_proj_V1_L56_I_V4_L56_I" postComponent="rs" weight="0."/>
        </continuousProjection>
        <continuousProjection id="proj_V1_L56_I_MT_L23_E" presynapticPopulation="V1_L56_I" postsynapticPopulation="MT_L23_E">
            <continuousConnectionInstanceW id="0" preCell="../V1_L56_I/0/L56_I_comp" postCell="../MT_L23_E/0/L23_E_comp" preComponent="silentSyn_proj_V1_L56_I_MT_L23_E" postComponent="rs" weight="0."/>
        </continuousProjection>
        <continuousProjection id="proj_V1_L56_I_MT_L23_I" presynapticPopulation="V1_L56_I" postsynapticPopulation="MT_L23_I">
            <continuousConnectionInstanceW id="0" preCell="../V1_L56_I/0/L56_I_comp" postCell="../MT_L23_I/0/L23_I_comp" preComponent="silentSyn_proj_V1_L56_I_MT_L23_I" postComponent="rs" weight="0."/>
        </continuousProjection>
        <continuousProjection id="proj_V1_L56_I_MT_L56_E" presynapticPopulation="V1_L56_I" postsynapticPopulation="MT_L56_E">
            <continuousConnectionInstanceW id="0" preCell="../V1_L56_I/0/L56_I_comp" postCell="../MT_L56_E/0/L56_E_comp" preComponent="silentSyn_proj_V1_L56_I_MT_L56_E" postComponent="rs" weight="0."/>
        </continuousProjection>
        <continuousProjection id="proj_V1_L56_I_MT_L56_I" presynapticPopulation="V1_L56_I" postsynapticPopulation="MT_L56_I">
            <continuousConnectionInstanceW id="0" preCell="../V1_L56_I/0/L56_I_comp" postCell="../MT_L56_I/0/L56_I_comp" preComponent="silentSyn_proj_V1_L56_I_MT_L56_I" postComponent="rs" weight="0."/>
        </continuousProjection>
        <continuousProjection id="proj_V4_L23_E_V1_L23_E" presynapticPopulation="V4_L23_E" postsynapticPopulation="V1_L23_E">
            <continuousConnectionInstanceW id="0" preCell="../V4_L23_E/0/L23_E_comp" postCell="../V1_L23_E/0/L23_E_comp" preComponent="silentSyn_proj_V4_L23_E_V1_L23_E" postComponent="rs" weight="0."/>
        </continuousProjection>
        <continuousProjection id="proj_V4_L23_E_V1_L23_I" presynapticPopulation="V4_L23_E" postsynapticPopulation="V1_L23_I">
            <continuousConnectionInstanceW id="0" preCell="../V4_L23_E/0/L23_E_comp" postCell="../V1_L23_I/0/L23_I_comp" preComponent="silentSyn_proj_V4_L23_E_V1_L23_I" postComponent="rs" weight="0."/>
        </continuousProjection>
        <continuousProjection id="proj_V4_L23_E_V1_L56_E" presynapticPopulation="V4_L23_E" postsynapticPopulation="V1_L56_E">
            <continuousConnectionInstanceW id="0" preCell="../V4_L23_E/0/L23_E_comp" postCell="../V1_L56_E/0/L56_E_comp" preComponent="silentSyn_proj_V4_L23_E_V1_L56_E" postComponent="rs" weight="0."/>
        </continuousProjection>
        <continuousProjection id="proj_V4_L23_E_V1_L56_I" presynapticPopulation="V4_L23_E" postsynapticPopulation="V1_L56_I">
            <continuousConnectionInstanceW id="0" preCell="../V4_L23_E/0/L23_E_comp" postCell="../V1_L56_I/0/L56_I_comp" preComponent="silentSyn_proj_V4_L23_E_V1_L56_I" postComponent="rs" weight="0."/>
        </continuousProjection>
        <continuousProjection id="proj_V4_L23_E_V4_L23_E" presynapticPopulation="V4_L23_E" postsynapticPopulation="V4_L23_E">
            <continuousConnectionInstanceW id="0" preCell="../V4_L23_E/0/L23_E_comp" postCell="../V4_L23_E/0/L23_E_comp" preComponent="silentSyn_proj_V4_L23_E_V4_L23_E" postComponent="rs" weight="1.5"/>
        </continuousProjection>
        <continuousProjection id="proj_V4_L23_E_V4_L23_I" presynapticPopulation="V4_L23_E" postsynapticPopulation="V4_L23_I">
            <continuousConnectionInstanceW id="0" preCell="../V4_L23_E/0/L23_E_comp" postCell="../V4_L23_I/0/L23_I_comp" preComponent="silentSyn_proj_V4_L23_E_V4_L23_I" postComponent="rs" weight="3.5"/>
        </continuousProjection>
        <continuousProjection id="proj_V4_L23_E_V4_L56_E" presynapticPopulation="V4_L23_E" postsynapticPopulation="V4_L56_E">
            <continuousConnectionInstance id="0" preCell="../V4_L23_E/0/L23_E_comp" postCell="../V4_L56_E/0/L56_E_comp" preComponent="silentSyn_proj_V4_L23_E_V4_L56_E" postComponent="rs"/>
        </continuousProjection>
        <continuousProjection id="proj_V4_L23_E_V4_L56_I" presynapticPopulation="V4_L23_E" postsynapticPopulation="V4_L56_I">
            <continuousConnectionInstanceW id="0" preCell="../V4_L23_E/0/L23_E_comp" postCell="../V4_L56_I/0/L56_I_comp" preComponent="silentSyn_proj_V4_L23_E_V4_L56_I" postComponent="rs" weight="0."/>
        </continuousProjection>
        <continuousProjection id="proj_V4_L23_E_MT_L23_E" presynapticPopulation="V4_L23_E" postsynapticPopulation="MT_L23_E">
            <continuousConnectionInstance id="0" preCell="../V4_L23_E/0/L23_E_comp" postCell="../MT_L23_E/0/L23_E_comp" preComponent="silentSyn_proj_V4_L23_E_MT_L23_E" postComponent="rs"/>
        </continuousProjection>
        <continuousProjection id="proj_V4_L23_E_MT_L23_I" presynapticPopulation="V4_L23_E" postsynapticPopulation="MT_L23_I">
            <continuousConnectionInstanceW id="0" preCell="../V4_L23_E/0/L23_E_comp" postCell="../MT_L23_I/0/L23_I_comp" preComponent="silentSyn_proj_V4_L23_E_MT_L23_I" postComponent="rs" weight="0."/>
        </continuousProjection>
        <continuousProjection id="proj_V4_L23_E_MT_L56_E" presynapticPopulation="V4_L23_E" postsynapticPopulation="MT_L56_E">
            <continuousConnectionInstanceW id="0" preCell="../V4_L23_E/0/L23_E_comp" postCell="../MT_L56_E/0/L56_E_comp" preComponent="silentSyn_proj_V4_L23_E_MT_L56_E" postComponent="rs" weight="0."/>
        </continuousProjection>
        <continuousProjection id="proj_V4_L23_E_MT_L56_I" presynapticPopulation="V4_L23_E" postsynapticPopulation="MT_L56_I">
            <continuousConnectionInstanceW id="0" preCell="../V4_L23_E/0/L23_E_comp" postCell="../MT_L56_I/0/L56_I_comp" preComponent="silentSyn_proj_V4_L23_E_MT_L56_I" postComponent="rs" weight="0."/>
        </continuousProjection>
        <continuousProjection id="proj_V4_L23_I_V1_L23_E" presynapticPopulation="V4_L23_I" postsynapticPopulation="V1_L23_E">
            <continuousConnectionInstanceW id="0" preCell="../V4_L23_I/0/L23_I_comp" postCell="../V1_L23_E/0/L23_E_comp" preComponent="silentSyn_proj_V4_L23_I_V1_L23_E" postComponent="rs" weight="0."/>
        </continuousProjection>
        <continuousProjection id="proj_V4_L23_I_V1_L23_I" presynapticPopulation="V4_L23_I" postsynapticPopulation="V1_L23_I">
            <continuousConnectionInstanceW id="0" preCell="../V4_L23_I/0/L23_I_comp" postCell="../V1_L23_I/0/L23_I_comp" preComponent="silentSyn_proj_V4_L23_I_V1_L23_I" postComponent="rs" weight="0."/>
        </continuousProjection>
        <continuousProjection id="proj_V4_L23_I_V1_L56_E" presynapticPopulation="V4_L23_I" postsynapticPopulation="V1_L56_E">
            <continuousConnectionInstanceW id="0" preCell="../V4_L23_I/0/L23_I_comp" postCell="../V1_L56_E/0/L56_E_comp" preComponent="silentSyn_proj_V4_L23_I_V1_L56_E" postComponent="rs" weight="0."/>
        </continuousProjection>
        <continuousProjection id="proj_V4_L23_I_V1_L56_I" presynapticPopulation="V4_L23_I" postsynapticPopulation="V1_L56_I">
            <continuousConnectionInstanceW id="0" preCell="../V4_L23_I/0/L23_I_comp" postCell="../V1_L56_I/0/L56_I_comp" preComponent="silentSyn_proj_V4_L23_I_V1_L56_I" postComponent="rs" weight="0."/>
        </continuousProjection>
        <continuousProjection id="proj_V4_L23_I_V4_L23_E" presynapticPopulation="V4_L23_I" postsynapticPopulation="V4_L23_E">
            <continuousConnectionInstanceW id="0" preCell="../V4_L23_I/0/L23_I_comp" postCell="../V4_L23_E/0/L23_E_comp" preComponent="silentSyn_proj_V4_L23_I_V4_L23_E" postComponent="rs" weight="-3.25"/>
        </continuousProjection>
        <continuousProjection id="proj_V4_L23_I_V4_L23_I" presynapticPopulation="V4_L23_I" postsynapticPopulation="V4_L23_I">
            <continuousConnectionInstanceW id="0" preCell="../V4_L23_I/0/L23_I_comp" postCell="../V4_L23_I/0/L23_I_comp" preComponent="silentSyn_proj_V4_L23_I_V4_L23_I" postComponent="rs" weight="-2.5"/>
        </continuousProjection>
        <continuousProjection id="proj_V4_L23_I_V4_L56_E" presynapticPopulation="V4_L23_I" postsynapticPopulation="V4_L56_E">
            <continuousConnectionInstanceW id="0" preCell="../V4_L23_I/0/L23_I_comp" postCell="../V4_L56_E/0/L56_E_comp" preComponent="silentSyn_proj_V4_L23_I_V4_L56_E" postComponent="rs" weight="0."/>
        </continuousProjection>
        <continuousProjection id="proj_V4_L23_I_V4_L56_I" presynapticPopulation="V4_L23_I" postsynapticPopulation="V4_L56_I">
            <continuousConnectionInstanceW id="0" preCell="../V4_L23_I/0/L23_I_comp" postCell="../V4_L56_I/0/L56_I_comp" preComponent="silentSyn_proj_V4_L23_I_V4_L56_I" postComponent="rs" weight="0."/>
        </continuousProjection>
        <continuousProjection id="proj_V4_L23_I_MT_L23_E" presynapticPopulation="V4_L23_I" postsynapticPopulation="MT_L23_E">
            <continuousConnectionInstanceW id="0" preCell="../V4_L23_I/0/L23_I_comp" postCell="../MT_L23_E/0/L23_E_comp" preComponent="silentSyn_proj_V4_L23_I_MT_L23_E" postComponent="rs" weight="0."/>
        </continuousProjection>
        <continuousProjection id="proj_V4_L23_I_MT_L23_I" presynapticPopulation="V4_L23_I" postsynapticPopulation="MT_L23_I">
            <continuousConnectionInstanceW id="0" preCell="../V4_L23_I/0/L23_I_comp" postCell="../MT_L23_I/0/L23_I_comp" preComponent="silentSyn_proj_V4_L23_I_MT_L23_I" postComponent="rs" weight="0."/>
        </continuousProjection>
        <continuousProjection id="proj_V4_L23_I_MT_L56_E" presynapticPopulation="V4_L23_I" postsynapticPopulation="MT_L56_E">
            <continuousConnectionInstanceW id="0" preCell="../V4_L23_I/0/L23_I_comp" postCell="../MT_L56_E/0/L56_E_comp" preComponent="silentSyn_proj_V4_L23_I_MT_L56_E" postComponent="rs" weight="0."/>
        </continuousProjection>
        <continuousProjection id="proj_V4_L23_I_MT_L56_I" presynapticPopulation="V4_L23_I" postsynapticPopulation="MT_L56_I">
            <continuousConnectionInstanceW id="0" preCell="../V4_L23_I/0/L23_I_comp" postCell="../MT_L56_I/0/L56_I_comp" preComponent="silentSyn_proj_V4_L23_I_MT_L56_I" postComponent="rs" weight="0."/>
        </continuousProjection>
        <continuousProjection id="proj_V4_L56_E_V1_L23_E" presynapticPopulation="V4_L56_E" postsynapticPopulation="V1_L23_E">
            <continuousConnectionInstanceW id="0" preCell="../V4_L56_E/0/L56_E_comp" postCell="../V1_L23_E/0/L23_E_comp" preComponent="silentSyn_proj_V4_L56_E_V1_L23_E" postComponent="rs" weight="0.5"/>
        </continuousProjection>
        <continuousProjection id="proj_V4_L56_E_V1_L23_I" presynapticPopulation="V4_L56_E" postsynapticPopulation="V1_L23_I">
            <continuousConnectionInstanceW id="0" preCell="../V4_L56_E/0/L56_E_comp" postCell="../V1_L23_I/0/L23_I_comp" preComponent="silentSyn_proj_V4_L56_E_V1_L23_I" postComponent="rs" weight="0.5"/>
        </continuousProjection>
        <continuousProjection id="proj_V4_L56_E_V1_L56_E" presynapticPopulation="V4_L56_E" postsynapticPopulation="V1_L56_E">
            <continuousConnectionInstanceW id="0" preCell="../V4_L56_E/0/L56_E_comp" postCell="../V1_L56_E/0/L56_E_comp" preComponent="silentSyn_proj_V4_L56_E_V1_L56_E" postComponent="rs" weight="0.9"/>
        </continuousProjection>
        <continuousProjection id="proj_V4_L56_E_V1_L56_I" presynapticPopulation="V4_L56_E" postsynapticPopulation="V1_L56_I">
            <continuousConnectionInstanceW id="0" preCell="../V4_L56_E/0/L56_E_comp" postCell="../V1_L56_I/0/L56_I_comp" preComponent="silentSyn_proj_V4_L56_E_V1_L56_I" postComponent="rs" weight="0.5"/>
        </continuousProjection>
        <continuousProjection id="proj_V4_L56_E_V4_L23_E" presynapticPopulation="V4_L56_E" postsynapticPopulation="V4_L23_E">
            <continuousConnectionInstanceW id="0" preCell="../V4_L56_E/0/L56_E_comp" postCell="../V4_L23_E/0/L23_E_comp" preComponent="silentSyn_proj_V4_L56_E_V4_L23_E" postComponent="rs" weight="0."/>
        </continuousProjection>
        <continuousProjection id="proj_V4_L56_E_V4_L23_I" presynapticPopulation="V4_L56_E" postsynapticPopulation="V4_L23_I">
            <continuousConnectionInstanceW id="0" preCell="../V4_L56_E/0/L56_E_comp" postCell="../V4_L23_I/0/L23_I_comp" preComponent="silentSyn_proj_V4_L56_E_V4_L23_I" postComponent="rs" weight="0.75"/>
        </continuousProjection>
        <continuousProjection id="proj_V4_L56_E_V4_L56_E" presynapticPopulation="V4_L56_E" postsynapticPopulation="V4_L56_E">
            <continuousConnectionInstanceW id="0" preCell="../V4_L56_E/0/L56_E_comp" postCell="../V4_L56_E/0/L56_E_comp" preComponent="silentSyn_proj_V4_L56_E_V4_L56_E" postComponent="rs" weight="1.5"/>
        </continuousProjection>
        <continuousProjection id="proj_V4_L56_E_V4_L56_I" presynapticPopulation="V4_L56_E" postsynapticPopulation="V4_L56_I">
            <continuousConnectionInstanceW id="0" preCell="../V4_L56_E/0/L56_E_comp" postCell="../V4_L56_I/0/L56_I_comp" preComponent="silentSyn_proj_V4_L56_E_V4_L56_I" postComponent="rs" weight="3.5"/>
        </continuousProjection>
        <continuousProjection id="proj_V4_L56_E_MT_L23_E" presynapticPopulation="V4_L56_E" postsynapticPopulation="MT_L23_E">
            <continuousConnectionInstanceW id="0" preCell="../V4_L56_E/0/L56_E_comp" postCell="../MT_L23_E/0/L23_E_comp" preComponent="silentSyn_proj_V4_L56_E_MT_L23_E" postComponent="rs" weight="0."/>
        </continuousProjection>
        <continuousProjection id="proj_V4_L56_E_MT_L23_I" presynapticPopulation="V4_L56_E" postsynapticPopulation="MT_L23_I">
            <continuousConnectionInstanceW id="0" preCell="../V4_L56_E/0/L56_E_comp" postCell="../MT_L23_I/0/L23_I_comp" preComponent="silentSyn_proj_V4_L56_E_MT_L23_I" postComponent="rs" weight="0."/>
        </continuousProjection>
        <continuousProjection id="proj_V4_L56_E_MT_L56_E" presynapticPopulation="V4_L56_E" postsynapticPopulation="MT_L56_E">
            <continuousConnectionInstanceW id="0" preCell="../V4_L56_E/0/L56_E_comp" postCell="../MT_L56_E/0/L56_E_comp" preComponent="silentSyn_proj_V4_L56_E_MT_L56_E" postComponent="rs" weight="0."/>
        </continuousProjection>
        <continuousProjection id="proj_V4_L56_E_MT_L56_I" presynapticPopulation="V4_L56_E" postsynapticPopulation="MT_L56_I">
            <continuousConnectionInstanceW id="0" preCell="../V4_L56_E/0/L56_E_comp" postCell="../MT_L56_I/0/L56_I_comp" preComponent="silentSyn_proj_V4_L56_E_MT_L56_I" postComponent="rs" weight="0."/>
        </continuousProjection>
        <continuousProjection id="proj_V4_L56_I_V1_L23_E" presynapticPopulation="V4_L56_I" postsynapticPopulation="V1_L23_E">
            <continuousConnectionInstanceW id="0" preCell="../V4_L56_I/0/L56_I_comp" postCell="../V1_L23_E/0/L23_E_comp" preComponent="silentSyn_proj_V4_L56_I_V1_L23_E" postComponent="rs" weight="0."/>
        </continuousProjection>
        <continuousProjection id="proj_V4_L56_I_V1_L23_I" presynapticPopulation="V4_L56_I" postsynapticPopulation="V1_L23_I">
            <continuousConnectionInstanceW id="0" preCell="../V4_L56_I/0/L56_I_comp" postCell="../V1_L23_I/0/L23_I_comp" preComponent="silentSyn_proj_V4_L56_I_V1_L23_I" postComponent="rs" weight="0."/>
        </continuousProjection>
        <continuousProjection id="proj_V4_L56_I_V1_L56_E" presynapticPopulation="V4_L56_I" postsynapticPopulation="V1_L56_E">
            <continuousConnectionInstanceW id="0" preCell="../V4_L56_I/0/L56_I_comp" postCell="../V1_L56_E/0/L56_E_comp" preComponent="silentSyn_proj_V4_L56_I_V1_L56_E" postComponent="rs" weight="0."/>
        </continuousProjection>
        <continuousProjection id="proj_V4_L56_I_V1_L56_I" presynapticPopulation="V4_L56_I" postsynapticPopulation="V1_L56_I">
            <continuousConnectionInstanceW id="0" preCell="../V4_L56_I/0/L56_I_comp" postCell="../V1_L56_I/0/L56_I_comp" preComponent="silentSyn_proj_V4_L56_I_V1_L56_I" postComponent="rs" weight="0."/>
        </continuousProjection>
        <continuousProjection id="proj_V4_L56_I_V4_L23_E" presynapticPopulation="V4_L56_I" postsynapticPopulation="V4_L23_E">
            <continuousConnectionInstanceW id="0" preCell="../V4_L56_I/0/L56_I_comp" postCell="../V4_L23_E/0/L23_E_comp" preComponent="silentSyn_proj_V4_L56_I_V4_L23_E" postComponent="rs" weight="0."/>
        </continuousProjection>
        <continuousProjection id="proj_V4_L56_I_V4_L23_I" presynapticPopulation="V4_L56_I" postsynapticPopulation="V4_L23_I">
            <continuousConnectionInstanceW id="0" preCell="../V4_L56_I/0/L56_I_comp" postCell="../V4_L23_I/0/L23_I_comp" preComponent="silentSyn_proj_V4_L56_I_V4_L23_I" postComponent="rs" weight="0."/>
        </continuousProjection>
        <continuousProjection id="proj_V4_L56_I_V4_L56_E" presynapticPopulation="V4_L56_I" postsynapticPopulation="V4_L56_E">
            <continuousConnectionInstanceW id="0" preCell="../V4_L56_I/0/L56_I_comp" postCell="../V4_L56_E/0/L56_E_comp" preComponent="silentSyn_proj_V4_L56_I_V4_L56_E" postComponent="rs" weight="-3.25"/>
        </continuousProjection>
        <continuousProjection id="proj_V4_L56_I_V4_L56_I" presynapticPopulation="V4_L56_I" postsynapticPopulation="V4_L56_I">
            <continuousConnectionInstanceW id="0" preCell="../V4_L56_I/0/L56_I_comp" postCell="../V4_L56_I/0/L56_I_comp" preComponent="silentSyn_proj_V4_L56_I_V4_L56_I" postComponent="rs" weight="-2.5"/>
        </continuousProjection>
        <continuousProjection id="proj_V4_L56_I_MT_L23_E" presynapticPopulation="V4_L56_I" postsynapticPopulation="MT_L23_E">
            <continuousConnectionInstanceW id="0" preCell="../V4_L56_I/0/L56_I_comp" postCell="../MT_L23_E/0/L23_E_comp" preComponent="silentSyn_proj_V4_L56_I_MT_L23_E" postComponent="rs" weight="0."/>
        </continuousProjection>
        <continuousProjection id="proj_V4_L56_I_MT_L23_I" presynapticPopulation="V4_L56_I" postsynapticPopulation="MT_L23_I">
            <continuousConnectionInstanceW id="0" preCell="../V4_L56_I/0/L56_I_comp" postCell="../MT_L23_I/0/L23_I_comp" preComponent="silentSyn_proj_V4_L56_I_MT_L23_I" postComponent="rs" weight="0."/>
        </continuousProjection>
        <continuousProjection id="proj_V4_L56_I_MT_L56_E" presynapticPopulation="V4_L56_I" postsynapticPopulation="MT_L56_E">
            <continuousConnectionInstanceW id="0" preCell="../V4_L56_I/0/L56_I_comp" postCell="../MT_L56_E/0/L56_E_comp" preComponent="silentSyn_proj_V4_L56_I_MT_L56_E" postComponent="rs" weight="0."/>
        </continuousProjection>
        <continuousProjection id="proj_V4_L56_I_MT_L56_I" presynapticPopulation="V4_L56_I" postsynapticPopulation="MT_L56_I">
            <continuousConnectionInstanceW id="0" preCell="../V4_L56_I/0/L56_I_comp" postCell="../MT_L56_I/0/L56_I_comp" preComponent="silentSyn_proj_V4_L56_I_MT_L56_I" postComponent="rs" weight="0."/>
        </continuousProjection>
        <continuousProjection id="proj_MT_L23_E_V1_L23_E" presynapticPopulation="MT_L23_E" postsynapticPopulation="V1_L23_E">
            <continuousConnectionInstanceW id="0" preCell="../MT_L23_E/0/L23_E_comp" postCell="../V1_L23_E/0/L23_E_comp" preComponent="silentSyn_proj_MT_L23_E_V1_L23_E" postComponent="rs" weight="0."/>
        </continuousProjection>
        <continuousProjection id="proj_MT_L23_E_V1_L23_I" presynapticPopulation="MT_L23_E" postsynapticPopulation="V1_L23_I">
            <continuousConnectionInstanceW id="0" preCell="../MT_L23_E/0/L23_E_comp" postCell="../V1_L23_I/0/L23_I_comp" preComponent="silentSyn_proj_MT_L23_E_V1_L23_I" postComponent="rs" weight="0."/>
        </continuousProjection>
        <continuousProjection id="proj_MT_L23_E_V1_L56_E" presynapticPopulation="MT_L23_E" postsynapticPopulation="V1_L56_E">
            <continuousConnectionInstanceW id="0" preCell="../MT_L23_E/0/L23_E_comp" postCell="../V1_L56_E/0/L56_E_comp" preComponent="silentSyn_proj_MT_L23_E_V1_L56_E" postComponent="rs" weight="0."/>
        </continuousProjection>
        <continuousProjection id="proj_MT_L23_E_V1_L56_I" presynapticPopulation="MT_L23_E" postsynapticPopulation="V1_L56_I">
            <continuousConnectionInstanceW id="0" preCell="../MT_L23_E/0/L23_E_comp" postCell="../V1_L56_I/0/L56_I_comp" preComponent="silentSyn_proj_MT_L23_E_V1_L56_I" postComponent="rs" weight="0."/>
        </continuousProjection>
        <continuousProjection id="proj_MT_L23_E_V4_L23_E" presynapticPopulation="MT_L23_E" postsynapticPopulation="V4_L23_E">
            <continuousConnectionInstanceW id="0" preCell="../MT_L23_E/0/L23_E_comp" postCell="../V4_L23_E/0/L23_E_comp" preComponent="silentSyn_proj_MT_L23_E_V4_L23_E" postComponent="rs" weight="0."/>
        </continuousProjection>
        <continuousProjection id="proj_MT_L23_E_V4_L23_I" presynapticPopulation="MT_L23_E" postsynapticPopulation="V4_L23_I">
            <continuousConnectionInstanceW id="0" preCell="../MT_L23_E/0/L23_E_comp" postCell="../V4_L23_I/0/L23_I_comp" preComponent="silentSyn_proj_MT_L23_E_V4_L23_I" postComponent="rs" weight="0."/>
        </continuousProjection>
        <continuousProjection id="proj_MT_L23_E_V4_L56_E" presynapticPopulation="MT_L23_E" postsynapticPopulation="V4_L56_E">
            <continuousConnectionInstanceW id="0" preCell="../MT_L23_E/0/L23_E_comp" postCell="../V4_L56_E/0/L56_E_comp" preComponent="silentSyn_proj_MT_L23_E_V4_L56_E" postComponent="rs" weight="0."/>
        </continuousProjection>
        <continuousProjection id="proj_MT_L23_E_V4_L56_I" presynapticPopulation="MT_L23_E" postsynapticPopulation="V4_L56_I">
            <continuousConnectionInstanceW id="0" preCell="../MT_L23_E/0/L23_E_comp" postCell="../V4_L56_I/0/L56_I_comp" preComponent="silentSyn_proj_MT_L23_E_V4_L56_I" postComponent="rs" weight="0."/>
        </continuousProjection>
        <continuousProjection id="proj_MT_L23_E_MT_L23_E" presynapticPopulation="MT_L23_E" postsynapticPopulation="MT_L23_E">
            <continuousConnectionInstanceW id="0" preCell="../MT_L23_E/0/L23_E_comp" postCell="../MT_L23_E/0/L23_E_comp" preComponent="silentSyn_proj_MT_L23_E_MT_L23_E" postComponent="rs" weight="1.5"/>
        </continuousProjection>
        <continuousProjection id="proj_MT_L23_E_MT_L23_I" presynapticPopulation="MT_L23_E" postsynapticPopulation="MT_L23_I">
            <continuousConnectionInstanceW id="0" preCell="../MT_L23_E/0/L23_E_comp" postCell="../MT_L23_I/0/L23_I_comp" preComponent="silentSyn_proj_MT_L23_E_MT_L23_I" postComponent="rs" weight="3.5"/>
        </continuousProjection>
        <continuousProjection id="proj_MT_L23_E_MT_L56_E" presynapticPopulation="MT_L23_E" postsynapticPopulation="MT_L56_E">
            <continuousConnectionInstance id="0" preCell="../MT_L23_E/0/L23_E_comp" postCell="../MT_L56_E/0/L56_E_comp" preComponent="silentSyn_proj_MT_L23_E_MT_L56_E" postComponent="rs"/>
        </continuousProjection>
        <continuousProjection id="proj_MT_L23_E_MT_L56_I" presynapticPopulation="MT_L23_E" postsynapticPopulation="MT_L56_I">
            <continuousConnectionInstanceW id="0" preCell="../MT_L23_E/0/L23_E_comp" postCell="../MT_L56_I/0/L56_I_comp" preComponent="silentSyn_proj_MT_L23_E_MT_L56_I" postComponent="rs" weight="0."/>
        </continuousProjection>
        <continuousProjection id="proj_MT_L23_I_V1_L23_E" presynapticPopulation="MT_L23_I" postsynapticPopulation="V1_L23_E">
            <continuousConnectionInstanceW id="0" preCell="../MT_L23_I/0/L23_I_comp" postCell="../V1_L23_E/0/L23_E_comp" preComponent="silentSyn_proj_MT_L23_I_V1_L23_E" postComponent="rs" weight="0."/>
        </continuousProjection>
        <continuousProjection id="proj_MT_L23_I_V1_L23_I" presynapticPopulation="MT_L23_I" postsynapticPopulation="V1_L23_I">
            <continuousConnectionInstanceW id="0" preCell="../MT_L23_I/0/L23_I_comp" postCell="../V1_L23_I/0/L23_I_comp" preComponent="silentSyn_proj_MT_L23_I_V1_L23_I" postComponent="rs" weight="0."/>
        </continuousProjection>
        <continuousProjection id="proj_MT_L23_I_V1_L56_E" presynapticPopulation="MT_L23_I" postsynapticPopulation="V1_L56_E">
            <continuousConnectionInstanceW id="0" preCell="../MT_L23_I/0/L23_I_comp" postCell="../V1_L56_E/0/L56_E_comp" preComponent="silentSyn_proj_MT_L23_I_V1_L56_E" postComponent="rs" weight="0."/>
        </continuousProjection>
        <continuousProjection id="proj_MT_L23_I_V1_L56_I" presynapticPopulation="MT_L23_I" postsynapticPopulation="V1_L56_I">
            <continuousConnectionInstanceW id="0" preCell="../MT_L23_I/0/L23_I_comp" postCell="../V1_L56_I/0/L56_I_comp" preComponent="silentSyn_proj_MT_L23_I_V1_L56_I" postComponent="rs" weight="0."/>
        </continuousProjection>
        <continuousProjection id="proj_MT_L23_I_V4_L23_E" presynapticPopulation="MT_L23_I" postsynapticPopulation="V4_L23_E">
            <continuousConnectionInstanceW id="0" preCell="../MT_L23_I/0/L23_I_comp" postCell="../V4_L23_E/0/L23_E_comp" preComponent="silentSyn_proj_MT_L23_I_V4_L23_E" postComponent="rs" weight="0."/>
        </continuousProjection>
        <continuousProjection id="proj_MT_L23_I_V4_L23_I" presynapticPopulation="MT_L23_I" postsynapticPopulation="V4_L23_I">
            <continuousConnectionInstanceW id="0" preCell="../MT_L23_I/0/L23_I_comp" postCell="../V4_L23_I/0/L23_I_comp" preComponent="silentSyn_proj_MT_L23_I_V4_L23_I" postComponent="rs" weight="0."/>
        </continuousProjection>
        <continuousProjection id="proj_MT_L23_I_V4_L56_E" presynapticPopulation="MT_L23_I" postsynapticPopulation="V4_L56_E">
            <continuousConnectionInstanceW id="0" preCell="../MT_L23_I/0/L23_I_comp" postCell="../V4_L56_E/0/L56_E_comp" preComponent="silentSyn_proj_MT_L23_I_V4_L56_E" postComponent="rs" weight="0."/>
        </continuousProjection>
        <continuousProjection id="proj_MT_L23_I_V4_L56_I" presynapticPopulation="MT_L23_I" postsynapticPopulation="V4_L56_I">
            <continuousConnectionInstanceW id="0" preCell="../MT_L23_I/0/L23_I_comp" postCell="../V4_L56_I/0/L56_I_comp" preComponent="silentSyn_proj_MT_L23_I_V4_L56_I" postComponent="rs" weight="0."/>
        </continuousProjection>
        <continuousProjection id="proj_MT_L23_I_MT_L23_E" presynapticPopulation="MT_L23_I" postsynapticPopulation="MT_L23_E">
            <continuousConnectionInstanceW id="0" preCell="../MT_L23_I/0/L23_I_comp" postCell="../MT_L23_E/0/L23_E_comp" preComponent="silentSyn_proj_MT_L23_I_MT_L23_E" postComponent="rs" weight="-3.25"/>
        </continuousProjection>
        <continuousProjection id="proj_MT_L23_I_MT_L23_I" presynapticPopulation="MT_L23_I" postsynapticPopulation="MT_L23_I">
            <continuousConnectionInstanceW id="0" preCell="../MT_L23_I/0/L23_I_comp" postCell="../MT_L23_I/0/L23_I_comp" preComponent="silentSyn_proj_MT_L23_I_MT_L23_I" postComponent="rs" weight="-2.5"/>
        </continuousProjection>
        <continuousProjection id="proj_MT_L23_I_MT_L56_E" presynapticPopulation="MT_L23_I" postsynapticPopulation="MT_L56_E">
            <continuousConnectionInstanceW id="0" preCell="../MT_L23_I/0/L23_I_comp" postCell="../MT_L56_E/0/L56_E_comp" preComponent="silentSyn_proj_MT_L23_I_MT_L56_E" postComponent="rs" weight="0."/>
        </continuousProjection>
        <continuousProjection id="proj_MT_L23_I_MT_L56_I" presynapticPopulation="MT_L23_I" postsynapticPopulation="MT_L56_I">
            <continuousConnectionInstanceW id="0" preCell="../MT_L23_I/0/L23_I_comp" postCell="../MT_L56_I/0/L56_I_comp" preComponent="silentSyn_proj_MT_L23_I_MT_L56_I" postComponent="rs" weight="0."/>
        </continuousProjection>
        <continuousProjection id="proj_MT_L56_E_V1_L23_E" presynapticPopulation="MT_L56_E" postsynapticPopulation="V1_L23_E">
            <continuousConnectionInstanceW id="0" preCell="../MT_L56_E/0/L56_E_comp" postCell="../V1_L23_E/0/L23_E_comp" preComponent="silentSyn_proj_MT_L56_E_V1_L23_E" postComponent="rs" weight="0.5"/>
        </continuousProjection>
        <continuousProjection id="proj_MT_L56_E_V1_L23_I" presynapticPopulation="MT_L56_E" postsynapticPopulation="V1_L23_I">
            <continuousConnectionInstanceW id="0" preCell="../MT_L56_E/0/L56_E_comp" postCell="../V1_L23_I/0/L23_I_comp" preComponent="silentSyn_proj_MT_L56_E_V1_L23_I" postComponent="rs" weight="0.5"/>
        </continuousProjection>
        <continuousProjection id="proj_MT_L56_E_V1_L56_E" presynapticPopulation="MT_L56_E" postsynapticPopulation="V1_L56_E">
            <continuousConnectionInstanceW id="0" preCell="../MT_L56_E/0/L56_E_comp" postCell="../V1_L56_E/0/L56_E_comp" preComponent="silentSyn_proj_MT_L56_E_V1_L56_E" postComponent="rs" weight="0.9"/>
        </continuousProjection>
        <continuousProjection id="proj_MT_L56_E_V1_L56_I" presynapticPopulation="MT_L56_E" postsynapticPopulation="V1_L56_I">
            <continuousConnectionInstanceW id="0" preCell="../MT_L56_E/0/L56_E_comp" postCell="../V1_L56_I/0/L56_I_comp" preComponent="silentSyn_proj_MT_L56_E_V1_L56_I" postComponent="rs" weight="0.5"/>
        </continuousProjection>
        <continuousProjection id="proj_MT_L56_E_V4_L23_E" presynapticPopulation="MT_L56_E" postsynapticPopulation="V4_L23_E">
            <continuousConnectionInstanceW id="0" preCell="../MT_L56_E/0/L56_E_comp" postCell="../V4_L23_E/0/L23_E_comp" preComponent="silentSyn_proj_MT_L56_E_V4_L23_E" postComponent="rs" weight="0.5"/>
        </continuousProjection>
        <continuousProjection id="proj_MT_L56_E_V4_L23_I" presynapticPopulation="MT_L56_E" postsynapticPopulation="V4_L23_I">
            <continuousConnectionInstanceW id="0" preCell="../MT_L56_E/0/L56_E_comp" postCell="../V4_L23_I/0/L23_I_comp" preComponent="silentSyn_proj_MT_L56_E_V4_L23_I" postComponent="rs" weight="0.5"/>
        </continuousProjection>
        <continuousProjection id="proj_MT_L56_E_V4_L56_E" presynapticPopulation="MT_L56_E" postsynapticPopulation="V4_L56_E">
            <continuousConnectionInstanceW id="0" preCell="../MT_L56_E/0/L56_E_comp" postCell="../V4_L56_E/0/L56_E_comp" preComponent="silentSyn_proj_MT_L56_E_V4_L56_E" postComponent="rs" weight="0.9"/>
        </continuousProjection>
        <continuousProjection id="proj_MT_L56_E_V4_L56_I" presynapticPopulation="MT_L56_E" postsynapticPopulation="V4_L56_I">
            <continuousConnectionInstanceW id="0" preCell="../MT_L56_E/0/L56_E_comp" postCell="../V4_L56_I/0/L56_I_comp" preComponent="silentSyn_proj_MT_L56_E_V4_L56_I" postComponent="rs" weight="0.5"/>
        </continuousProjection>
        <continuousProjection id="proj_MT_L56_E_MT_L23_E" presynapticPopulation="MT_L56_E" postsynapticPopulation="MT_L23_E">
            <continuousConnectionInstanceW id="0" preCell="../MT_L56_E/0/L56_E_comp" postCell="../MT_L23_E/0/L23_E_comp" preComponent="silentSyn_proj_MT_L56_E_MT_L23_E" postComponent="rs" weight="0."/>
        </continuousProjection>
        <continuousProjection id="proj_MT_L56_E_MT_L23_I" presynapticPopulation="MT_L56_E" postsynapticPopulation="MT_L23_I">
            <continuousConnectionInstanceW id="0" preCell="../MT_L56_E/0/L56_E_comp" postCell="../MT_L23_I/0/L23_I_comp" preComponent="silentSyn_proj_MT_L56_E_MT_L23_I" postComponent="rs" weight="0.75"/>
        </continuousProjection>
        <continuousProjection id="proj_MT_L56_E_MT_L56_E" presynapticPopulation="MT_L56_E" postsynapticPopulation="MT_L56_E">
            <continuousConnectionInstanceW id="0" preCell="../MT_L56_E/0/L56_E_comp" postCell="../MT_L56_E/0/L56_E_comp" preComponent="silentSyn_proj_MT_L56_E_MT_L56_E" postComponent="rs" weight="1.5"/>
        </continuousProjection>
        <continuousProjection id="proj_MT_L56_E_MT_L56_I" presynapticPopulation="MT_L56_E" postsynapticPopulation="MT_L56_I">
            <continuousConnectionInstanceW id="0" preCell="../MT_L56_E/0/L56_E_comp" postCell="../MT_L56_I/0/L56_I_comp" preComponent="silentSyn_proj_MT_L56_E_MT_L56_I" postComponent="rs" weight="3.5"/>
        </continuousProjection>
        <continuousProjection id="proj_MT_L56_I_V1_L23_E" presynapticPopulation="MT_L56_I" postsynapticPopulation="V1_L23_E">
            <continuousConnectionInstanceW id="0" preCell="../MT_L56_I/0/L56_I_comp" postCell="../V1_L23_E/0/L23_E_comp" preComponent="silentSyn_proj_MT_L56_I_V1_L23_E" postComponent="rs" weight="0."/>
        </continuousProjection>
        <continuousProjection id="proj_MT_L56_I_V1_L23_I" presynapticPopulation="MT_L56_I" postsynapticPopulation="V1_L23_I">
            <continuousConnectionInstanceW id="0" preCell="../MT_L56_I/0/L56_I_comp" postCell="../V1_L23_I/0/L23_I_comp" preComponent="silentSyn_proj_MT_L56_I_V1_L23_I" postComponent="rs" weight="0."/>
        </continuousProjection>
        <continuousProjection id="proj_MT_L56_I_V1_L56_E" presynapticPopulation="MT_L56_I" postsynapticPopulation="V1_L56_E">
            <continuousConnectionInstanceW id="0" preCell="../MT_L56_I/0/L56_I_comp" postCell="../V1_L56_E/0/L56_E_comp" preComponent="silentSyn_proj_MT_L56_I_V1_L56_E" postComponent="rs" weight="0."/>
        </continuousProjection>
        <continuousProjection id="proj_MT_L56_I_V1_L56_I" presynapticPopulation="MT_L56_I" postsynapticPopulation="V1_L56_I">
            <continuousConnectionInstanceW id="0" preCell="../MT_L56_I/0/L56_I_comp" postCell="../V1_L56_I/0/L56_I_comp" preComponent="silentSyn_proj_MT_L56_I_V1_L56_I" postComponent="rs" weight="0."/>
        </continuousProjection>
        <continuousProjection id="proj_MT_L56_I_V4_L23_E" presynapticPopulation="MT_L56_I" postsynapticPopulation="V4_L23_E">
            <continuousConnectionInstanceW id="0" preCell="../MT_L56_I/0/L56_I_comp" postCell="../V4_L23_E/0/L23_E_comp" preComponent="silentSyn_proj_MT_L56_I_V4_L23_E" postComponent="rs" weight="0."/>
        </continuousProjection>
        <continuousProjection id="proj_MT_L56_I_V4_L23_I" presynapticPopulation="MT_L56_I" postsynapticPopulation="V4_L23_I">
            <continuousConnectionInstanceW id="0" preCell="../MT_L56_I/0/L56_I_comp" postCell="../V4_L23_I/0/L23_I_comp" preComponent="silentSyn_proj_MT_L56_I_V4_L23_I" postComponent="rs" weight="0."/>
        </continuousProjection>
        <continuousProjection id="proj_MT_L56_I_V4_L56_E" presynapticPopulation="MT_L56_I" postsynapticPopulation="V4_L56_E">
            <continuousConnectionInstanceW id="0" preCell="../MT_L56_I/0/L56_I_comp" postCell="../V4_L56_E/0/L56_E_comp" preComponent="silentSyn_proj_MT_L56_I_V4_L56_E" postComponent="rs" weight="0."/>
        </continuousProjection>
        <continuousProjection id="proj_MT_L56_I_V4_L56_I" presynapticPopulation="MT_L56_I" postsynapticPopulation="V4_L56_I">
            <continuousConnectionInstanceW id="0" preCell="../MT_L56_I/0/L56_I_comp" postCell="../V4_L56_I/0/L56_I_comp" preComponent="silentSyn_proj_MT_L56_I_V4_L56_I" postComponent="rs" weight="0."/>
        </continuousProjection>
        <continuousProjection id="proj_MT_L56_I_MT_L23_E" presynapticPopulation="MT_L56_I" postsynapticPopulation="MT_L23_E">
            <continuousConnectionInstanceW id="0" preCell="../MT_L56_I/0/L56_I_comp" postCell="../MT_L23_E/0/L23_E_comp" preComponent="silentSyn_proj_MT_L56_I_MT_L23_E" postComponent="rs" weight="0."/>
        </continuousProjection>
        <continuousProjection id="proj_MT_L56_I_MT_L23_I" presynapticPopulation="MT_L56_I" postsynapticPopulation="MT_L23_I">
            <continuousConnectionInstanceW id="0" preCell="../MT_L56_I/0/L56_I_comp" postCell="../MT_L23_I/0/L23_I_comp" preComponent="silentSyn_proj_MT_L56_I_MT_L23_I" postComponent="rs" weight="0."/>
        </continuousProjection>
        <continuousProjection id="proj_MT_L56_I_MT_L56_E" presynapticPopulation="MT_L56_I" postsynapticPopulation="MT_L56_E">
            <continuousConnectionInstanceW id="0" preCell="../MT_L56_I/0/L56_I_comp" postCell="../MT_L56_E/0/L56_E_comp" preComponent="silentSyn_proj_MT_L56_I_MT_L56_E" postComponent="rs" weight="-3.25"/>
        </continuousProjection>
        <continuousProjection id="proj_MT_L56_I_MT_L56_I" presynapticPopulation="MT_L56_I" postsynapticPopulation="MT_L56_I">
            <continuousConnectionInstanceW id="0" preCell="../MT_L56_I/0/L56_I_comp" postCell="../MT_L56_I/0/L56_I_comp" preComponent="silentSyn_proj_MT_L56_I_MT_L56_I" postComponent="rs" weight="-2.5"/>
        </continuousProjection>
        <inputList id="modulation_l23_E" population="V1_L23_E" component="iclamp_23_V1">
            <input id="0" target="../V1_L23_E/0/L23_E_comp" destination="synapses"/>
        </inputList>
        <inputList id="modulation_l56_E" population="V1_L56_E" component="iclamp_56_V1">
            <input id="0" target="../V1_L56_E/0/L56_E_comp" destination="synapses"/>
        </inputList>
        <inputList id="modulation_l23_E" population="V4_L23_E" component="iclamp_23_V4">
            <input id="0" target="../V4_L23_E/0/L23_E_comp" destination="synapses"/>
        </inputList>
        <inputList id="modulation_l56_E" population="V4_L56_E" component="iclamp_56_V4">
            <input id="0" target="../V4_L56_E/0/L56_E_comp" destination="synapses"/>
        </inputList>
        <inputList id="modulation_l23_E" population="MT_L23_E" component="iclamp_23_MT">
            <input id="0" target="../MT_L23_E/0/L23_E_comp" destination="synapses"/>
        </inputList>
        <inputList id="modulation_l56_E" population="MT_L56_E" component="iclamp_56_MT">
            <input id="0" target="../MT_L56_E/0/L56_E_comp" destination="synapses"/>
        </inputList>
    </network>
</neuroml>
